// SBML level 2 version 4

function Constant_flux__irreversible(v)
  v;
end
Constant_flux__irreversible is "Constant flux (irreversible)";

function Henri_Michaelis_Menten__irreversible(substrate, Km, V)
  V*substrate/(Km + substrate);
end
Henri_Michaelis_Menten__irreversible is "Henri-Michaelis-Menten (irreversible)";

model New_Model()

  // Compartments:
  compartment compartment = 1;

  // Species:
  species GGPP in compartment = 1;
  species phytoene in compartment = 1;

  // Reactions:
  r1: => GGPP; compartment*Constant_flux__irreversible(v);
    v = 0.1;
  r2: GGPP => phytoene; compartment*Henri_Michaelis_Menten__irreversible(GGPP, Km, V);
    Km = 1; V = 100;
  r3: phytoene => ; compartment*k1*phytoene;
    k1 = 0.4;

  // Unit definitions:
  unit length = metre;
  unit area = metre^2;
  unit volume = litre;
  unit time = second;
  unit substance = mole;
end
